// COMSOL Multiphysics 6.4.0.293 model "FresnelBiprism_RayOptics.mph"
// Outline of the model tree

Parameters
  lambda0 = 589.3[nm]
  n_air = 1
  n_glass = 1.5168
  a = 50[mm]
  z2 = 950[mm]
  beta = 1[deg]
  slit_b = 0.08[mm]
  H = 15[mm]
  thickness = 2[mm]
  tip_half = 0.03[mm]
  x_apex = -H*tan(beta)
  screen_x = a+z2
  fan_angle = atan(1.25*H/a)

Geometry
  geom1 "几何 1" (3D, length unit mm)
    wp1: WorkPlane "工作平面 1"
      pol1: Polygon "多边形 1"
        source = table
        table = {{x_apex, tip_half}, {0, H}, {0, -H}, {x_apex, -tip_half}, {x_apex, tip_half}}
    ext1: Extrude "拉伸 1" | workplane = wp1; input = wp1; distance = thickness
    fin: Finalize "形成联合体"
  pgeom_gop "几何" (1D, length unit m)
    pt1: Point "点 1"

Materials
  mat1: Common "N-SF? 1.5168 glass" on all domains
    RefractiveIndex: RefractiveIndex "折射率"
      n = n_glass
      ki = 0

Physics
  gop: GeometricalOptics on all domains
    dependent variable q = {qx, qy, qz}
    IntensityComputation.IntensityComputation = ComputeIntensity
    ExteriorUnmeshedProperties.next = n_air
    ComputeOpticalPathLength.ComputeOpticalPathLength = 1
    mp1: MediumProperties "介质属性 1" (default)
    matd1: MaterialDiscontinuity "Glass-air interfaces" (default)
    op1: RayProperties "射线属性 1"
      RayPropertySpecification = SpecifyVacuumWavelength
      nu = 4.54e14[Hz]
      lambda0 = 660[nm]
      mp = 1
    relg1: ReleaseGrid "Slit point source fan"
      GridType = AllCombinations
      rcc = {1, 0, 0}
      x0 = {-a, 0, thickness/2}
      RayDirectionVector = Conical
      SamplingFromDistribution = Deterministic
      Nw = 101
      ConicalDistribution = Flat
      TransverseDirection = UserDefined
      et = {0, 1, 0}
      alphac = fan_angle
      lambda0 = lambda0
      InitialPolarizationType = UnPolarized

Mesh
  mesh1 "Mesh 1"
    size: MeshSizeDefault "大小" | hmax = 3; hmin = 0.54; hcurve = 0.6; hnarrow = 0.5; hgrad = 1.5
    ftet1: FreeTet "自由四面体网格 1" on remaining entities
      size1: Size "大小 1" on entire geometry | hmax = 1.5

Studies
  std1 "Ray Tracing Study"
    rtrac: RayTracing "射线追踪"
      timestepspec = specifylength
      tlist = range(0,0.01,1)
      llist = range(0,0.01,1.2)
      numberofreflections = 6

Solver configurations
  sol1 "解 1" (study std1)
    v1: Variables "因变量 1"
    t1: Time "瞬态求解器 1"
      fc1: FullyCoupled "全耦合 1"
      i1: Iterative "迭代 1"
        ja1: Jacobi "雅可比 1"

Datasets
  dset1: Solution | solution = sol1
  ray1: Ray "射线 1"
    solution = sol1
    rgeomspec = fromphysics
    rgeom = pgeom_gop
    posdof = {comp1.qx, comp1.qy, comp1.qz}
    physicsinterface = gop

Plots
  pg1: PlotGroup3D "Fresnel Biprism Ray Trajectories" | data = ray1; title = Fresnel biprism: two refracted ray bundles
    rtrj1: RayTrajectories "射线轨迹 1"
      col1: Color "颜色表达式 1" | expr = gop.L; descr = Optical path length
      exp1: Export "导出表达式 1" | expr = {gop.pidx, gop.L, gop.I}; descr = {Ray index, Optical path length, Ray intensity}

Exports
  img1: Image "图像 1" | width = 1800; height = 1000; pngfilename = D:\cc\comsol_sim\FresnelBiprism_RayOptics.png
  data1: Plot "绘图 1" | filename = D:\cc\comsol_sim\FresnelBiprism_RayOptics.txt