// COMSOL Multiphysics 6.4.0.293 model "FresnelBiprism_RayOptics_with_appearance.mph"
// Outline of the model tree

Parameters
  lambda0 = 589.3[nm]
  n_air = 1
  n_glass = 1.5168
  a = 50[mm]
  z2 = 950[mm]
  beta = 1[deg]
  slit_b = 0.08[mm]
  H = 15[mm]
  thickness = 2[mm]
  tip_half = 0.03[mm]
  x_apex = -H*tan(beta)
  screen_x = a+z2
  fan_angle = atan(1.25*H/a)

Geometry
  geom1 "几何 1" (3D, length unit mm)
    wp1: WorkPlane "工作平面 1"
      pol1: Polygon "多边形 1"
        source = table
        table = {{x_apex, tip_half}, {0, H}, {0, -H}, {x_apex, -tip_half}, {x_apex, tip_half}}
    ext1: Extrude "拉伸 1" | workplane = wp1; input = wp1; distance = thickness
    fin: Finalize "形成联合体"
  pgeom_gop "几何" (1D, length unit m)
    pt1: Point "点 1"
  mech "几何 2" (3D, length unit mm)
    foot_left: Block "左支脚" | size = {80, 120, 30}; pos = {-80, -60, -50}
    foot_right: Block "右支脚" | size = {80, 120, 30}; pos = {1000, -60, -50}
    rail_main: Block "光学导轨" | size = {1160, 60, 10}; pos = {-80, -30, -20}
    rail_strip_a: Block "导轨凸轨 A" | size = {1160, 4, 6}; pos = {-80, -24, -10}
    rail_strip_b: Block "导轨凸轨 B" | size = {1160, 4, 6}; pos = {-80, 20, -10}
    rail_end_a: Block "左端盖" | size = {20, 70, 16}; pos = {-90, -35, -20}
    rail_end_b: Block "右端盖" | size = {20, 70, 16}; pos = {1070, -35, -20}
    slider_source: Block "光源滑块" | size = {60, 90, 4}; pos = {-80, -45, -4}
    slider_source_top: Block "光源滑块顶板" | size = {52, 72, 2}; pos = {-76, -36, 0}
    slider_source_knob: Cylinder "光源滑块旋钮" | r = 3.2; h = 8; pos = {-50, -49, -2}; axis = {0, 1, 0}; axistype = cartesian
    slider_prism: Block "棱镜滑块" | size = {60, 90, 4}; pos = {-30, -45, -4}
    slider_prism_top: Block "棱镜滑块顶板" | size = {52, 72, 2}; pos = {-26, -36, 0}
    slider_prism_knob: Cylinder "棱镜滑块旋钮" | r = 3.2; h = 8; pos = {0, -49, -2}; axis = {0, 1, 0}; axistype = cartesian
    slider_screen: Block "光屏滑块" | size = {60, 90, 4}; pos = {970, -45, -4}
    slider_screen_top: Block "光屏滑块顶板" | size = {52, 72, 2}; pos = {974, -36, 0}
    slider_screen_knob: Cylinder "光屏滑块旋钮" | r = 3.2; h = 8; pos = {1000, -49, -2}; axis = {0, 1, 0}; axistype = cartesian
    source_shell: Cylinder "圆形光源壳" | r = 14; h = 20; pos = {-72, 0, 1}; axis = {1, 0, 0}; axistype = cartesian
    source_lens: Cylinder "光源镜筒" | r = 10; h = 4; pos = {-53, 0, 1}; axis = {1, 0, 0}; axistype = cartesian
    source_slit: Block "狭缝片" | size = {2, 24, 30}; pos = {-51, -12, -14}
    source_post: Cylinder "光源支柱" | r = 4; h = 45; pos = {-50, 0, 2}
    prism_post_left: Cylinder "棱镜左立柱" | r = 3; h = 48; pos = {0, -22, 2}
    prism_post_right: Cylinder "棱镜右立柱" | r = 3; h = 48; pos = {0, 22, 2}
    prism_crossbar: Block "棱镜横梁" | size = {24, 54, 5}; pos = {-12, -27, 45}
    wp_prism_jaws: WorkPlane "工作平面" | quickplane = yz; quickx = -10
      pol_wp_prism_jaws_0: Polygon "多边形"
        source = table
        table = {{14, 1}, {22, 1}, {22, 8}, {18, 24}, {14, 24}, {18, 8}}
      pol_wp_prism_jaws_1: Polygon "多边形 1"
        source = table
        table = {{-14, 1}, {-22, 1}, {-22, 8}, {-18, 24}, {-14, 24}, {-18, 8}}
    ext_wp_prism_jaws: Extrude "双棱镜 V 形夹爪" | workplane = wp_prism_jaws; input = wp_prism_jaws; distance = 20
    screen_post_left: Cylinder "光屏左立柱" | r = 4; h = 132; pos = {1000, -100, 2}
    screen_post_right: Cylinder "光屏右立柱" | r = 4; h = 132; pos = {1000, 100, 2}
    screen_face: Block "白色光屏" | size = {3, 220, 180}; pos = {1000, -110, -50}
    screen_frame_top: Block "光屏上框" | size = {5, 230, 8}; pos = {1000, -115, 130}
    screen_frame_bottom: Block "光屏下框" | size = {5, 230, 8}; pos = {1000, -115, -58}
    screen_frame_left: Block "光屏左框" | size = {5, 8, 188}; pos = {1000, -115, -54}
    screen_frame_right: Block "光屏右框" | size = {5, 8, 188}; pos = {1000, 107, -54}
    wp_glass: WorkPlane "工作平面 2"
      pol_wp_glass_0: Polygon "多边形"
        source = table
        table = {{-0.2618, 0.03}, {0, 15}, {0, -15}, {-0.2618, -0.03}, {-0.2618, 0.03}}
    ext_wp_glass: Extrude "双棱镜玻璃外观" | workplane = wp_glass; input = wp_glass; distance = 2
    fin: Finalize "形成联合体"

Materials
  mat1: Common "N-SF? 1.5168 glass" on all domains
    RefractiveIndex: RefractiveIndex "折射率"
      n = n_glass
      ki = 0

Physics
  gop: GeometricalOptics on all domains
    dependent variable q = {qx, qy, qz}
    IntensityComputation.IntensityComputation = ComputeIntensity
    ExteriorUnmeshedProperties.next = n_air
    ComputeOpticalPathLength.ComputeOpticalPathLength = 1
    mp1: MediumProperties "介质属性 1" (default)
    matd1: MaterialDiscontinuity "Glass-air interfaces" (default)
    op1: RayProperties "射线属性 1"
      RayPropertySpecification = SpecifyVacuumWavelength
      nu = 4.54e14[Hz]
      lambda0 = 660[nm]
      mp = 1
    relg1: ReleaseGrid "Slit point source fan"
      GridType = AllCombinations
      rcc = {1, 0, 0}
      x0 = {-a, 0, thickness/2}
      RayDirectionVector = Conical
      SamplingFromDistribution = Deterministic
      Nw = 101
      ConicalDistribution = Flat
      TransverseDirection = UserDefined
      et = {0, 1, 0}
      alphac = fan_angle
      lambda0 = lambda0
      InitialPolarizationType = UnPolarized

Mesh
  mesh1 "Mesh 1"
    size: MeshSizeDefault "大小" | hmax = 3; hmin = 0.54; hcurve = 0.6; hnarrow = 0.5; hgrad = 1.5
    ftet1: FreeTet "自由四面体网格 1" on remaining entities
      size1: Size "大小 1" on entire geometry | hmax = 1.5

Studies
  std1 "Ray Tracing Study"
    rtrac: RayTracing "射线追踪"
      timestepspec = specifylength
      tlist = range(0,0.01,1)
      llist = range(0,0.01,1.2)
      numberofreflections = 6

Solver configurations
  sol1 "解 1" (study std1)
    v1: Variables "因变量 1"
    t1: Time "瞬态求解器 1"
      fc1: FullyCoupled "全耦合 1"
      i1: Iterative "迭代 1"
        ja1: Jacobi "雅可比 1"

Datasets
  dset1: Solution | solution = sol1
  ray1: Ray "射线 1"
    solution = sol1
    rgeomspec = fromphysics
    rgeom = pgeom_gop
    posdof = {comp1.qx, comp1.qy, comp1.qz}
    physicsinterface = gop

Plots
  pg1: PlotGroup3D "Fresnel Biprism Ray Trajectories" | data = ray1; title = Fresnel biprism: two refracted ray bundles
    rtrj1: RayTrajectories "射线轨迹 1"
      col1: Color "颜色表达式 1" | expr = gop.L; descr = Optical path length
      exp1: Export "导出表达式 1" | expr = {gop.pidx, gop.L, gop.I}; descr = {Ray index, Optical path length, Ray intensity}

Exports
  img1: Image "图像 1" | width = 1800; height = 1000; pngfilename = D:\cc\comsol_sim\FresnelBiprism_RayOptics.png
  data1: Plot "绘图 1" | filename = D:\cc\comsol_sim\FresnelBiprism_RayOptics.txt